class market_data
{
	char32 market;
	char256 node;
	double LMP;
	double MW;
}
module tape;
#ifdef MARKET_DATA
#set MARKET_DATA=$MARKET_DATA market_data@caiso_0096WD_7_N001_20200101-20210101
#else
#define MARKET_DATA=market_data@caiso_0096WD_7_N001_20200101-20210101
#endif
object market_data
{
	name "market_data@caiso_0096WD_7_N001_20200101-20210101";
	market caiso;
	node 0096WD_7_N001;
	object player
	{
		file "caiso.csv";
		property "LMP,MW";
	};
}
