// this file is used if local.glm is not found
#define TIMEZONE=${TIMEZONE:-US/CA/Los Angeles}
#define WEATHER=${WEATHER:-CA-San_Jose_Intl_Ap.tmy3}
#define STARTTIME=${STARTTIME:-2016-07-01 00:00:00}
#define STOPTIME=${STOPTIME:-2016-07-02 00:00:00}
